# SKRIP LAMMPS: FINGERPRINT UNTUK FASE LIQUID / AMORF
units           real
atom_style      charge
boundary        p p p

# MEMBACA FILE HASIL TAHAP 1
read_data       ../membuat_amorf/liquid_silica_2400K.data

pair_style      reaxff NULL checkqeq yes
pair_coeff      * * ../potensial/ffield.reax.SiOH Si O

neighbor        2.5 bin
neigh_modify    delay 0 every 1 check yes
timestep        0.5

thermo          1000
thermo_style    custom step temp pe ke press

fix             f_qeq all qeq/reaxff 1 0.0 10.0 1.0e-6 reaxff

# Jalankan NVT singkat pada suhu yang sama (2400 K)
fix             f_nvt all nvt temp 2400.0 2400.0 50.0

# Panggil PLUMED dengan file input yang sama
fix             f_plumed all plumed plumedfile plumed.dat

run             50000

# Ubah nama file output cairan
shell           mv histo2_distribusi data_fingerprint_liquid.txt
