# Stage 05: optional PLUMED well-tempered metadynamics.
# Default PLUMED file uses stock Local-Q6; exact Niu-style XRD/Debye WTMetaD requires a custom PLUMED CV.
#   lmp -var phlabel pH7p0 -var baseatoms 1536 -var Tprod 2300 -var plumedfile plumed/stock_localq6/plumed_localq6_pH7p0_N1536.dat -in lammps/in.05_wtmetad_plumed

clear
units           real
atom_style      charge
boundary        p p p
newton          on

variable        phlabel    string pH7p0
variable        baseatoms  string 1536
variable        Tprod      equal 2300.0
variable        dt         equal 0.25
variable        nheat      equal 80000      # 20 ps default
variable        nmeta      equal 400000     # 100 ps default; increase to >= 2 ns for meaningful FES
variable        plumedfile string plumed/stock_localq6/plumed_localq6_${phlabel}_N${baseatoms}.dat
variable        rundir     string runs/${phlabel}_N${baseatoms}/05_wtmetad_plumed
shell           mkdir -p ${rundir}
log             ${rundir}/log.lammps

read_data       runs/${phlabel}_N${baseatoms}/03_calcination_1173K/calcined_1173K.data

pair_style      reaxff NULL safezone 2.0 mincap 100
pair_coeff      * * potentials/ffield.reax.SiOH Si O H
neighbor        2.0 bin
neigh_modify    every 10 delay 0 check yes
fix             qeq all qeq/reaxff 1 0.0 10.0 1.0e-6 reaxff maxiter 200

timestep        ${dt}
thermo          1000
thermo_style    custom step time temp press pe ke etotal vol density
thermo_modify   flush yes lost warn

dump            dmp all custom 2000 ${rundir}/traj_wtmetad.lammpstrj id type q x y z vx vy vz
dump_modify     dmp sort id
fix             rb all reaxff/bonds 2000 ${rundir}/bonds.reaxff

fix             heat all npt temp 1173.0 ${Tprod} 100.0 iso 1.0 1.0 1000.0
run             ${nheat}
unfix           heat

fix             prod all npt temp ${Tprod} ${Tprod} 100.0 iso 1.0 1.0 1000.0
fix             plm all plumed plumedfile ${plumedfile} outfile ${rundir}/plumed.log
run             ${nmeta}
unfix           plm
unfix           prod

write_data      ${rundir}/wtmetad_final.data
write_restart   ${rundir}/wtmetad_final.restart
unfix           rb
unfix           qeq
undump          dmp
